// COMSOL Multiphysics 6.0.0.405 model "terminal falling velocity of sand grain -without Run.mph"
// Outline of the model tree

Parameters
  rho_water = 1000[kg/m^3]  // Density, water
  mu_water = 1.51e-3[Pa*s]  // Dynamic viscosity, water
  r_grain = 1[mm]  // Radius, grain
  V_grain = 4/3*pi*r_grain^3  // Grain volume
  rho_grain = 2900[kg/m^3]  // Grain density
  m_grain = V_grain*rho_grain  // Grain mass
  F_g = -m_grain*g_const  // Gravitational force on grain

Variables
  var1 "Variables 1"
    F_z = intop1(-w_lm[Pa])  // Drag force

Couplings
  intop1: Integration on boundaries 6, 7 | axisym = on

Geometry
  geom1 "Geometry 1" (2D axisymmetric, length unit m)
    r1: Rectangle | pos = {0, -6e-3}; size = {6e-3, 14e-3}
    c1: Circle | r = 1e-3
    dif1: Difference | input = r1; input2 = c1
    fin: Finalize "Form Union"

Physics
  spf: LaminarFlow on all domains
    dependent variable u = {u, v, w}
    fp1: FluidProperties (default) | rho_mat = userdef; rho = rho_water; mu_mat = userdef; mu = mu_water
    init1: init "Initial Values 1" (default)
    axi1: AxialSymmetry (default)
    wallbc1: WallBC "Wall 1" (default) | wallConstraints = weakConstraints
    vf1: VolumeForce on all domains | F = {0, 0, -rho_water*(Xdott+g_const)}
    constr1: PointwiseConstraint on points 2, 3 | constraintExpression = u_lm; order = 1; frame = geometry
    ge1: GlobalEquations
      name = X
      equation = Xt-Xdot
      valueType = complex
      DependentVariableQuantity = displacement
      CustomDependentVariableUnit = m
      SourceTermQuantity = velocity
      CustomSourceTermUnit = m
    ge2: GlobalEquations
      name = Xdot
      equation = Xdott-(F_z+F_g)/m_grain
      valueType = complex
      DependentVariableQuantity = velocity
      CustomDependentVariableUnit = m
      SourceTermQuantity = acceleration
      CustomSourceTermUnit = m
    inl1: InletBoundary "Inlet 1" on boundaries 2 | U0in = -Xdot
    open1: OpenBoundary on boundaries 4
    wallbc2: WallBC "Wall 2" on boundaries 5 | BoundaryCondition = Slip

Mesh
  mesh1 "Mesh 1"
    size: MeshSizeDefault | hgrad = 1.05; hauto = 3; custom = on
    ftri1: FreeTri "Free Triangular 1" on remaining entities
      size1: Size on boundaries 3 | hmax = 1.5e-4; custom = on
      size2: Size on boundaries 6, 7 | hmax = 0.75e-4; custom = on

Studies
  std1 "Study 1"
    time: Transient "Time Dependent" | tlist = range(0,0.025,1); usertol = on; rtol = 0.001

Solver configurations
  sol1 "Solution 1" (study std1)
    v1: Variables "Dependent Variables 1"
    t1: Time "Time-Dependent Solver 1"
      tlist = range(0,0.025,1)
      rtol = 0.001
      atolglobalfactor = 0.05
      atolmethod = {comp1_p, scaled, comp1_u, global, comp1_u_lm, global, comp1_ODE1, global, comp1_ODE2, global}
      atolvaluemethod = {comp1_p, factor, comp1_u, factor, comp1_u_lm, factor, comp1_ODE1, factor, comp1_ODE2, factor}
      atolfactor = {comp1_p, 1, comp1_u, 0.1, comp1_u_lm, 0.1, comp1_ODE1, 0.1, comp1_ODE2, 0.1}
      tstepsbdf = intermediate
      maxorder = 2
      stabcntrl = on
      bwinitstepfrac = 0.01
      estrat = exclude
      rhoinf = 0.5
      predictor = constant
      fc1: FullyCoupled
        linsolver = d1
        maxiter = 8
        ntolfact = 0.5
        damp = 0.9
        jtech = once
        stabacc = aacc
        aaccdim = 5
        aaccmix = 0.9
        aaccdelay = 1
      d1: Direct "Direct, fluid flow variables (spf)" | linsolver = pardiso; pivotperturb = 1.0E-13

Datasets
  dset1: Solution | solution = sol1
  rev1: Revolve2D "Revolution 2D" | data = dset1; startangle = -90; revangle = 225

Plots
  pg1: PlotGroup2D "Velocity (spf)" | data = dset1; dataisaxisym = on
    surf1: Surface | expr = spf.U
    str1: Streamline | expr = {u, w}
  pg2: PlotGroup2D "Pressure (spf)" | data = dset1; dataisaxisym = on
    con1: Contour | expr = p; levelrounding = off
  pg3: PlotGroup3D "Velocity, 3D (spf)" | data = rev1
    surf1: Surface | expr = spf.U
  pg4: PlotGroup1D "1D Plot Group 4" | data = dset1; xlabel = Time (s); ylabel = Grain speed (m/s)
    ptgr1: PointGraph on points 1 | expr = -Xdot
  pg5: PlotGroup1D "1D Plot Group 5"
    data = dset1
    xlabel = Time (s)
    ylabel = F<sub>z</sub>, F<sub>g</sub>, and F<sub>g</sub>+F<sub>z</sub> (N)
    ptgr1: PointGraph on points 1 | expr = F_z; descr = Drag force; legends = F_z
    ptgr2: PointGraph on points 1 | expr = F_g; legends = F_g
    ptgr3: PointGraph on points 1 | expr = F_z+F_g; legends = F_z+F_g
  pg6: PlotGroup3D "3D Plot Group 6" | data = rev1

Exports
  anim1: Animation | target = player; framesel = all; frametime = 0.3
  anim2: Animation | target = player; frametime = 0.4
  anim3: Animation | target = player
  anim4: Animation | target = player